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# Anchor Vertical Stiffness:
k_anchor := 19000*kN/m = 108.493 kip/in
# Modulus of Steel:
E := 29*10^6*psi
# Proposed Model Anchor Diameter / Radius:
d := .9882 in
r := 0.5*d = 0.4941 in
# Cross-sectional Area of Anchor Rod:
a := .25*π*d^2
# Equivalent Length of Model Anchor Required to Match Vertical Stiffness:
L_eq := E*a/k_anchor = 205.011 in
# Anchor Vertical Stiffness:
k_anchor := 19000*kN/m = 108.493 kip/in
# Modulus of Steel:
E := 29*10^6*psi
# Proposed Model Anchor Diameter / Radius:
d := 0.25 in
r := 0.5*d = 0.125 in
d_pile := 3657.6 mm = 144 in
# Cross-sectional Area of Anchor Rod:
h_pile := 3048 mm = 120 in
a := .25*π*d^2
# Equivalent Length of Model Anchor Required to Match Vertical Stiffness:
a_pile := 0.9*h_pile*d_pile = 15552 in^2
L_eq := E*a/k_anchor = 13.121 in
p_eff := 635 kN/a_pile = 9.17912 psi
a_total := 9*a = 0.441786 in^2
τ := 632 kN/a_total = 321.602 kips_per_sq_inch
p_eff*cos(52.3 deg) = 5.61328 psi
p_sug := 0.2 kN/m^2
I := π/64*d^4 = 0.000191748 in^4
635 kN/p_sug = 34175.4 ft^2
E*I/L_eq = 47.883 J
632 kN = 142079 lbf
650 kN = 146.126 kip
L_eq - 0.5 in = 12.621 in
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# Diameter of Pile (Anchor Diameter):
d_pile := 26 ft = 312 in
# Depth of Pile (90% of Anchor Height):
z := d_pile = 312 in
# Submerged Soil Weight:
γ := 109.4*lbf/ft^3
# Soil Friction Angle:
ϕ := 52.3 deg
# Modulus of Subgrade Reaction Value (Extrapolated):
k := 254.7*MN/m^3 = 938.304 lbf/in^3
# Calculation of Constants:
α := ϕ/2 = 0.456404
β := 45 deg + ϕ/2 = 1.2418
K_o := 0.4
K_a := (1 - sin(ϕ))/(1 + sin(ϕ)) = 0.116555
C_1 := tan(β)^2*tan(α)/tan(β - ϕ) + K_o*(tan(ϕ)*sin(β)/(cos(α)*tan(β - ϕ)) + tan(β)*(tan(ϕ)*sin(β) - tan(α))) = 14.7961
C_2 := tan(β)/tan(β - ϕ) - K_a = 8.46307
# Lateral Bearing Capacity of Shallow Soil on Anchor:
p_us := (C_1*z + C_2*d_pile)*γ*z = 143.343 kip/in
# Loading Factor:
A := (3 - 0.8*z/d_pile) = 2.2
# Lateral Soil Resistance (p-y) Curve; (p as a function of y):
p(y) := A*p_us*tanh(k*z/(A*p_us)*y)
y := 0, 0.5 in .. 4 in
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Y := 0, 0.5 in .. 4 in
p(Y)*Y = [0; 68348.4; 230149; 418027; 600668; 773330; 938883; 1100424; 1259921] lbf
A = 2.2
mean(p) =  # error: This value has the form: ƒ(Length) → Time^-2 · Mass, but must have the form: any1.
70 MPa = 10.1526 kips_per_sq_inch
