# Anchor Weight
# Variables
t_top := 0.5 in
t_skirt := 0.5 in
d_pile := 200 in
l_skirt := 200 in
d_anchor := 120 in
h_gusset := 8 in
t_gusset := 0.5 in
n_holes := 8
w_percent := 70 %
# skirt area
v_skirt := 0.25*π*(d_pile^2 - (d_pile - 2*t_skirt)^2)*(l_skirt + h_gusset) = 65181.8 in^3
θ := 360 deg/n_holes = 45 deg
arc := θ*d_pile/(2*4) = 19.635 in
chord := d_pile*sin(arc/d_pile) = 19.6034 in
G_a := d_anchor/2 = 60 in
G_b := G_a*sin(θ)/sin((π - θ)/2) = 45.922 in
G_c := sqrt(chord^2 + ((d_pile - d_anchor)/2)^2) = 44.5454 in
v_gussets := n_holes*(G_a + G_b + 2*G_c)*t_gusset*h_gusset = 6240.41 in^3
v_top := (.25*d_pile^2)*t_top = 5000 in^3
d_pile = 200 in
v_cut := -w_percent*(G_b/2*sqrt(G_a^2 - G_b^2/4))*t_top*n_holes = -3563.82 in^3
v_rings := (π*((14.875 in)^2 - (14.125 in)^2) + π*((3 in)^2 - (1.875 in)^2) + π*n_holes*((3 in)^2 - (1.875 in)^2))*h_gusset = 29.2865 L
v_rings := (((14.875 in)^2 - (14.125 in)^2) + ((3 in)^2 - (1.875 in)^2) + n_holes*((3 in)^2 - (1.875 in)^2))*π*h_gusset = 1787.17 in^3
(14.875 in)^2 - (14.125 in)^2 = 21.75 in^2
((14.875 in)^2 - (14.125 in)^2) + ((3 in)^2 - (1.875 in)^2) = 27.2344 in^2
v_lug := 22724443.92 mm^3 = 1386.73 in^3
(3 in)^2 - (1.875 in)^2 = 5.48437 in^2
12.7 mm = 0.5 in
weight := (0.284*lbm/in^3)*(v_lug + v_rings + v_cut + v_top + v_gussets + v_skirt) = 21593.2 lb
7.85*gm/cm^3 = 0.283599 lb/in^3
2832.1 mm = 111.5 in
2*1828.8*mm = 144 in
19.05 mm = 0.75 in
2794 mm = 110 in
v_model := 716752418*mm^3 = 716.752 L
w_model := (0.284*lbm/in^3)*v_model = 12421.9 lb
